N := 128
ω := 0 .. N/2
t := 0 .. (N - 1)
# Обратная задача для PDM
OutSignal[t] := (1 + cos(2*π/N*3*t))/2
PDM(f) :=
    N ← rows(f)
    g[0] ← 0
    for k ∈ 1 .. (N - 1)
        ave_1 ← 1/k*sum(f[i], i = 0 .. k - 1)
        ave_2 ← 1/k*sum(g[i], i = 0 .. k - 1)
        g[k] ←
            1 if (ave_1 > ave_2)
            0 otherwise
    g
InSignal := PDM(OutSignal)
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Ave(X, W) :=
    N ← rows(X)
    for k ∈ 0 .. (N - 1)
        Y[k + W/2] ← 1/W*sum(X[mod(k + i, N)], i = 0 .. W - 1)
    Y
f[t] := (2 + cos(2*π/N*4*t) + cos(2*π/N*9*t))/4
# Сравни и сделай вывод!!!
1/N*sum(f[t]*OutSignal[t], t) = 0.25
1/N*sum(f[t]*InSignal[t], t) = 0.242625
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pdmNUM(X, bytes) :=
    qBits ← 8*bytes
    N ← rows(X)
    i ← 0
    for j ∈ 0 .. (floor(N/qBits) - 1)
        Y[j] ← 0
        for k ∈ 0 .. (qBits - 1)
            Y[j] ← Y[j] + X[i]*2^(qBits - 1 - k)
            i ← i + 1
    Y
Wave := pdmNUM(InSignal, 1)
Wave = [127; 180; 32; 2; 93; 255; 237; 32; 0; 150; 255; 247; 72; 0; 133; 191]
WRITEPRN("pdmNUM_64.txt") □ Wave
